*INCLUDE, INPUT=E_2-1.msh
*INCLUDE, INPUT=FIXED.nam
*INCLUDE, INPUT=LOAD.nam
*INCLUDE, INPUT=STABILITY.nam

*STEP
*STATIC
*BOUNDARY
	NFIXED,1,3,0
	NLOAD,2,3,0
	NSTABILITY,2,3,0
*CLOAD
	NLOAD,1,5000
*NODE FILE
	U
*END STEP
