*INCLUDE, INPUT=E_3-7.msh
*INCLUDE, INPUT=FXD_BC.nam
*INCLUDE, INPUT=PND_BC.nam
*INCLUDE, INPUT=LD_PT.nam

*STEP
*STATIC
*BOUNDARY
	NFXD_BC,1,3,0
	NPND_BC,1,3,0
	NLD_PT,3,3,0
*CLOAD
	NLD_PT,2,-25E3
*NODE FILE
	U
*END STEP
